// COMSOL Multiphysics 5.6.0.280 model "ppmodel.mph"
// Outline of the model tree
// Unit system: none

Parameters
  alpha_P = 0.1  // par
  alpha_A = 0.1  // par
  mu = 1e-4  // par
  holling = 0.4  // par
  kappa = 0.76  // par
  gamma_P = 3.349081  // par
  gamma_A = 1.902356  // par
  D = 0.003  // par

Variables
  var1 "变量 1"
    F1 = x*(alpha_A-kappa-x+gamma_A*y/(1.0+holling*gamma_A*y))+mu  // funcation1
    F2 = y*(alpha_P-y+gamma_P*x/(1.0+holling*gamma_P*x))+mu  // funcation2

Geometry
  geom1 "几何 1" (2D, length unit m)
    r1: Rectangle "矩形 1" | size = {2, 2}
    fin: Finalize "形成联合体"

Physics
  c: CoefficientFormPDE "系数形式偏微分方程" on all domains
    dependent variable u
    cfeq1: CoefficientFormPDE "系数形式偏微分方程 1" (default) | c = {D, 0, 0, D}; f = 0; da = 1; al = {-F1, -F2}
    zflx1: ZeroFluxBoundary "零通量 1" (default)
    init1: init "初始值 1" (default) | u = 0.0001

Mesh
  mesh1 "网格 1"
    size: MeshSizeDefault "大小" | hauto = 4
    fq1: FreeQuad "自由四边形网格 1" on remaining entities

Studies
  std1 "研究 1"
    time: Transient "瞬态" | tlist = range(0,100,1500); usertol = on; rtol = 0.000001

Solver configurations
  sol1 "解 1" (study std1)
    v1: Variables "因变量 1"
    t1: Time "瞬态求解器 1" | tlist = range(0,100,1500)
      dDef: Direct "直接"
      fc1: FullyCoupled "全耦合 1" | linsolver = dDef

Datasets
  dset1: Solution | solution = sol1

Plots
  pg1: PlotGroup2D "二维绘图组 1" | data = dset1
    surf1: Surface "表面 1" | expr = u
  pg2: PlotGroup2D "二维绘图组 2" | data = dset1
    surf1: Surface "表面 1" | expr = if(-log(u)>15,15,-log(u))
      hght1: Height "高度表达式 1" | expr = u

Exports
  data1: Data "数据 1"
    data = dset1
    expr = if(-log(u)>25,25,-log(u))
    filename = E:\厦大生物物理\00000备份桌面\Tipping Points\program\9_2d_model\comsol\0.76.txt